# Pedestrians in a 2D box

#  intial conditions

dimension        2
boundary         f f p

units            si
atom_style       sphere

lattice          sq 1.1 origin 0.5 0.5 0.0
region           zona1 block 0 40 0 40 -1 1 units box
create_box       1 zona1
create_atoms     1 region zona1
set              atom * mass 70.0
set              atom * diameter 0.6

velocity         all create 0.5e24 4928459 dist gaussian                                #  dist gaussian
comm_modify      vel yes                                                              # required for gran/hooke style

pair_style       hybrid/overlay gran/hooke 0 0 0 240000 0 0 social 0.08 3.5       # k=240000 kappa=0.08 cut_off=3.5
pair_coeff       * * social 2000.0  3.5 0.3                                           # ntype ntype a_one=2000 cut_off=3.5 rad=0.3
pair_coeff       * * gran/hooke

#  boundary conditions

fix wall1  all wall/social xlo 0  2000 0.08 3.5 units box
fix wall2  all wall/social xhi 40 2000 0.08 3.5 units box
fix wall3  all wall/social ylo 0  2000 0.08 3.5 units box
fix wall4  all wall/social yhi 40 2000 0.08 3.5 units box
fix		   mywallsy all wall/gran 0 0 0 240000 0 0 xplane  0.0 30.0

fix target all social/self 70 1 xyz                            # mass=70 vd=4 point=in (x,y,z)


# 2 obstacles

region		void1 sphere 10 4 0 1
delete_atoms	region void1
region		void2 sphere 20 7 0 1
delete_atoms	region void2


# visualize

dump        3 all movie 10 inmovie.mpg type type &
            axes yes 0.8 0.02 view 0 0 adiam 0.6

#dump        2 all image 300 inimage.*.jpg type type &
            axes yes 0.8 0.02 view 0 0

# run the process

atom_modify   sort 0 0.0
timestep      0.005
fix           1 all nve
thermo        100
run           5500
