# Pedestrians in a 2D box with to doors


variable imax equal 50
variable i loop 50 ${imax}
label start_of_loop1
print "ITERATION i = $i"		#Loop de velocidad de deseo

variable jmax equal 1
variable j loop 1 ${jmax}
label start_of_loop2
print "ITERATION j = $j"		# Loop de corrida

# INITIAL CONDITIONS

# room: 20x20 meters with 225 individuals
# doors:2 doors of 1.2 meters width (each)

dimension        2
boundary         f f p

units            si
atom_style       sphere

lattice          hex 1.44 origin 0.5 0.5 0.0
region           zona1 block 0.0  20.0  0.0   20  -1 1 units box
#region           zona2 block 7 13 7  13 -1 1 units box
region           zona2 cylinder z 10 10 3 -1 1 units box


create_box       1 zona1
create_atoms     1 region zona2
set              atom * mass 70.0
set              atom * diameter 0.6

velocity         all create 1e23 $j dist gaussian   		# gaussian distribution
comm_modify      vel yes                                        # required for gran/social style

# the interacting forces follow:

# k=240000 (coef. for the tangential force)
# A=2000   (coef. for the social repulsion)
# B=0.08   (coef. for the social repulsion)
# rc=3.5   (cut-off distance for the social repulsion)
# ri=0.3   (pedestrians radious)

pair_style       hybrid/overlay gran/social 0 0 0 240000 0 1 social 0.08 3.5
pair_coeff       * * social 2000 3.5 0.3
pair_coeff       * * gran/social


# BOUNDARY CONDITIONS

variable 		k equal ($i/4)+0.5

fix walls all wall/region zona1 social 2000 0.08 3.5
fix wallg all wall/region zona1 granular 240000 120000 0.001      # k=240000 unused=1 rad=0.001
fix target all social/self/custom 70 $k xy 10 10                  # mass=70 vd=4 point=in (x,y,z) door_x=10 door_y=10


compute 		1 all property/atom x                     # get the atoms x-coordinate


compute     ps all social_pressure/atom
#dump        presion all custom 500 in_presion_social.txt c_ps x y


# VISUALIZATION (OPTIONAL)

dump        3 all movie 500 movie_presion_v$k_s$j.mpg c_ps type &
            axes yes 0.8 0.02 view 0 0 zoom 2 adiam 0.6

#dump        2 all image 200 inimage_v$i_s$j.jpg type type &
#            axes yes 0.8 0.02 view 0 0


# RUN THE PROCESS

atom_modify   sort 0 0.0
timestep      0.0001
fix           1 all nve/limit 0.001
#thermo       500
#thermo_style  custom step c_ps
#thermo_style  custom step c_mycompute	                         #  show the number of individuals outside de room (dont forget the"step" option)

# ESTE ES EL LOOP DE UN PROCESO

variable nmax equal 20000
variable n loop ${nmax}
label start_of_loop3

run           500

#print "${pv}" append in_presion.txt


variable t equal 0.05*$n
if "$t > 5" then "jump SELF break"
next n

jump SELF start_of_loop3


# TERMINACION DEL PROCESO

label break

#print "$k  $j  $t" append print.txt


clear
variable n delete
next j
jump SELF start_of_loop2
# TERMINACION DEL LOOP 2

clear
next i
jump SELF start_of_loop1
